# bulk water

units           metal
boundary        p p p
atom_style      atomic

neighbor        2.0 bin
neigh_modify    every 50 delay 0 check no

read_data	    ../lmp/water.lmp
mass 		    1 16
mass		    2 2

replicate       3 4 4
# restart         99 restart_48.mpiio
# read_restart    ../lmp/restart_48.mpiio

pair_style	    deepmd ../model/graph-compress-preprocess.pb
pair_coeff

velocity        all create 330.0 23456789

fix             1 all nvt temp 330.0 330.0 0.5
timestep        0.0005
thermo_style    custom step pe ke etotal temp press vol
thermo          20
dump		    1 all custom 100 water.dump id type x y z

run             99
